<?xml version="1.0"?>

<propeller name="solar_impulse-propeller">

    <ixx> 5.0 </ixx>
    <diameter unit="IN"> 157.0 </diameter>
    <numblades> 2 </numblades>
    <minpitch> 10 </minpitch>
    <maxpitch> 15 </maxpitch>

    <table name="C_THRUST">
        <tableData>
            0.0   0.18
            0.3   0.15
            0.6   0.10
            1.0   0.02
        </tableData>
    </table>

    <table name="C_POWER">
        <tableData>
            0.3   0.075
            0.6   0.070
            1.0   0.010
        </tableData>
    </table>

</propeller>
